// COMSOL Multiphysics 5.4.0.388 model "modelprojet_V5.mph"
// Outline of the model tree

Parameters
  d = 150[um]
  ly = 0.5[mm]
  lz = 2[mm]
  Lm = 427[um]
  Ls = 307[um]
  td = 200[nm]
  w = 517[um]
  Lc = 4[mm]
  hc = 1[mm]
  wc = 2[mm]
  Lc2 = 3990[um]
  hc2 = 990[um]
  wc2 = 1990[um]
  v0 = 0.03[m/s]

Functions
  gp1: GaussianPulse | location = 0.5
  an1: Analytic

Variables
  var1 "vitesse et accélération"
    a = t*1[m/s/s/s]
    v0 = a/2*t

Selections
  sel1: Explicit "all domains" on all domains
  sel2: Explicit "heater" on domains 3
  sel3: Explicit "wires" on domains 2, 4
  dif1: Difference "flow" | entitydim = 3; add = {sel1}; subtract = {sel2, sel3}

Probes
  dom1: Domain "Upstream" on domains 2 | expr = T; unit = K; descr = Temperature; table = tbl1
  dom2: Domain "Downstream" on domains 4 | expr = T; unit = K; descr = Temperature; table = tbl1
  var1: GlobalVariable "Global Variable Probe 1" | expr = dom2-dom1; unit = K; table = tbl1

Geometry
  geom1 "Geometry 1" (3D, length unit µm)
    wp1: WorkPlane | unite = on
      r1: Rectangle | size = {Ls, td}
      r2: Rectangle | pos = {2*d+Lm+Ls, 0}; size = {Ls, td}
      dif1: Difference (disabled) | input = r3; input2 = r1, r2; keep = on
    ext1: Extrude | workplane = wp1; input = wp1; distance = w
    blk1: Block "chanel in" | pos = {-(Lc/2-(Ls+d+Lm/2)), -(hc/2-td/2), -(wc/2-w/2)}; size = {Lc, hc, wc}
    blk2: Block "chanel in 1" (disabled)
      pos = {-(Lc2/2-(Ls+d+Lm/2)), -(hc2/2-td/2), -(wc2/2-w/2)}
      size = {Lc2, hc2, wc2}
    wp2: WorkPlane | unite = on
      r3: Rectangle "heater" | pos = {Ls+d, 0}; size = {Lm, td}
    ext2: Extrude | workplane = wp2; input = wp2; distance = w
    dif1: Difference | input = blk1; input2 = ext1, ext2; keep = on
    fin: Finalize "Form Union"

Materials
  mat1: Common "Carbon dioxide" on selection dif1
    def "Basic"
      dynamicviscosity = eta(T)
      ratioofspecificheat = 1.3
      heatcapacity = Cp(T)
      density = rho(pA,T)
      thermalconductivity = k(T)
      eta: Piecewise | arg = T; pieces = {220.0, 600.0, -1.48502597E-6+6.46786388E-8*T^1-3.66170537E-11*T^2+1.24501217E-14*T^3}; argunit = K; fununit = Pa*s
      Cp: Piecewise | arg = T; pieces = {220.0, 600.0, 459.913258+1.86487996*T^1-0.00212921519*T^2+1.22488004E-6*T^3}; argunit = K; fununit = J/(kg*K)
      rho: Analytic | expr = pA*0.04401/R_const[K*mol/J]/T; args = {pA, T}; dermethod = manual; argders = {{pA, d(pA*0.04401/R_const/T,pA)}, {T, d(pA*0.04401/R_const/T,T)}}; argunit = Pa,K; fununit = kg/m^3
      k: Piecewise | arg = T; pieces = {220.0, 600.0, -0.00132472616+4.13956923E-5*T^1+6.70889081E-8*T^2-2.11083153E-11*T^3}; argunit = K; fununit = W/(m*K)
  mat2: Common "Au - Gold" on selection sel2
    def "Basic"
      electricconductivity = 45.6e6[S/m]
      thermalexpansioncoefficient = 14.2e-6[1/K]
      heatcapacity = 129[J/(kg*K)]
      density = 19300[kg/m^3]
      thermalconductivity = 317[W/(m*K)]
    Enu "Young's modulus and Poisson's ratio"
      youngsmodulus = 70e9[Pa]
      poissonsratio = 0.44
  mat3: Common "Ni - Nickel" on selection sel3
    def "Basic"
      electricconductivity = 13.8e6[S/m]
      thermalexpansioncoefficient = 13.4e-6[1/K]
      heatcapacity = 445[J/(kg*K)]
      density = 8900[kg/m^3]
      thermalconductivity = 90.7[W/(m*K)]
    Enu "Young's modulus and Poisson's ratio"
      youngsmodulus = 219e9[Pa]
      poissonsratio = 0.31

Physics
  ht: HeatTransferInSolidsAndFluids on all domains
    dependent variable T
    solid1: SolidHeatTransferModel "Solid 1" (default)
    fluid1: FluidHeatTransferModel "Fluid 1" on selection dif1 | minput_velocity = {v0, 0, 0}
    init1: init "Initial Values 1" (default)
    ins1: ThermalInsulation (default)
    hs1: HeatSource on selection sel2 | heatSourceType = HeatRate; P0 = 12e-3; Q0 = 12e-3; materialType = from_mat
    temp1: TemperatureBoundary "Temperature 1" on boundaries 5 | T0 = 293[K]
    ifl1: Inflow on boundaries 1
    ofl1: ConvectiveOutflow "Outflow 1" on boundaries 24

Mesh
  mesh1 "Mesh 1" (physics-controlled)

Studies
  std1 "Study 1"
    param: Parametric "Parametric Sweep" | useaccumtable = on; accumtable = new
    stat: Stationary
  std2 "Study 2"
    time: Transient "Time Dependent" | tlist = range(0,0.1,2); sweeptype = filled

Solver configurations
  sol1 "Solution 1" (study std1)
    v1: Variables "Dependent Variables 1"
    s1: Stationary "Stationary Solver 1"
      p1: Parametric | pcontinuationmode = no
      fc1: FullyCoupled | linsolver = d1; initstep = 0.01; minstep = 1.0E-6; maxiter = 50
      d1: Direct "PARDISO (ht)" | linsolver = pardiso; pivotperturb = 1.0E-13
  sol2 "Parametric Solutions 1" (study std1)
  sol3 "Solution 3" (study std2)
    v1: Variables "Dependent Variables 1"
    t1: Time "Time-Dependent Solver 1"
      tlist = range(0,0.1,2)
      atolmethod = {comp1_T, global}
      atolvaluemethod = {comp1_T, factor}
      atol = {comp1_T, 1e-3}
      maxorder = 2
      estrat = exclude
      fc1: FullyCoupled
        linsolver = d1
        maxiter = 5
        damp = 0.9
        jtech = once
        stabacc = aacc
        aaccdim = 5
        aaccmix = 0.9
        aaccdelay = 1
      d1: Direct "PARDISO (ht)" | linsolver = pardiso; pivotperturb = 1.0E-13

Datasets
  dset1: Solution | solution = sol1
  dset2: Solution "Probe Solution 2" | solution = sol3
  avh1: Average "Upstream" on domains 2 | data = dset2
  avh2: Average "Downstream" on domains 4 | data = dset2
  dset3: Solution | solution = sol2
  dset4: Solution | solution = sol3

Derived values
  pev1: EvalPoint "Upstream" | data = avh1; table = tbl1; expr = T
  pev2: EvalPoint "Downstream" | data = avh2; table = tbl1; expr = T
  gev1: EvalGlobal "Global Variable Probe 1" | data = dset2; table = tbl1; expr = dom2-dom1

Tables
  tbl1: Table "Probe Table 1"
    Time (s) | Temperature (K), Upstream | Temperature (K), Downstream | dom2-dom1 (K)
    0 | 293.15 | 293.15 | -1.59452e-05
    7.66703e-05 | 293.148 | 293.15 | 0.00210824
    0.000153341 | 293.145 | 293.151 | 0.00582298
    0.000306681 | 293.141 | 293.156 | 0.0149922
    0.000613362 | 293.215 | 293.248 | 0.0326316
    0.000920043 | 293.39 | 293.434 | 0.0440737
    0.00153341 | 294.149 | 294.194 | 0.0446987
    0.00214677 | 295.273 | 295.302 | 0.0293626
    0.00276013 | 296.694 | 296.699 | 0.00427172
    0.00398685 | 300.032 | 299.976 | -0.0557455
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
Plots
  pg1: PlotGroup3D "3D Plot Group 1" | data = dset1
    surf1: Surface | expr = T
    slc1: Slice | expr = T; quickplane = xy; quickznumber = 1
  pg2: PlotGroup1D "Probe Plot Group 2"
    tblp1: Table "Probe Table Graph 1" | table = tbl1; xaxisdata = auto; plotcolumns = {2, 3, 4}
  pg3: PlotGroup3D "3D Plot Group 3" | data = dset2
  pg4: PlotGroup1D "1D Plot Group 4" | data = avh1
    lngr1: LineGraph on edges 39 | data = dset2; expr = T; descr = Temperature; xdata = expr; xdataexpr = v0
  pg5: PlotGroup3D "Temperature (ht)" | data = dset4
    surf1: Surface | expr = T
  pg6: PlotGroup3D "Isothermal Contours (ht)" | data = dset4
    iso1: Isosurface | expr = T
  pg7: PlotGroup3D "vitesse-t" | data = dset1
    surf1: Surface | data = dset2; expr = T

Exports
  data1: Data | data = avh1; expr = T; filename = /Users/huojiaxi/Desktop/PPC/projetPPC/data/upstream.txt
  data2: Data | data = avh1; expr = T; filename = /Users/huojiaxi/Desktop/PPC/projetPPC/data/acceleration-up.txt